#ADP in Water
units real
atom_style full
boundary p p p
processors * * *
pair_style lj/cut/coul/cut 12.0
dielectric 1.0
pair_modify             tail yes mix geometric
bond_style              harmonic
angle_style             harmonic
dihedral_style  harmonic
kspace_style    none
neighbor                2.0 bin
neigh_modify    every 1 delay 0 check yes
read_data               adp_in_water.data #adp_water.data
group                   mobile union all
velocity all create 300 100
thermo_style    custom etotal ke pe ebond eangle edihed eimp evdwl ecoul elong temp press vol
thermo_modify   line multi
thermo                  1000
fix             1 all nvt temp 300.0 300.0 100.0
fix ssages all ssages
run 100000000
#min_style cg
#minimize 0.0 0.0001 2000 2000
#dump minimize all xyz 1000 min.xyz
#fix 1 all npt temp 300.0 300.0 100.00 iso 1.0 1.0 1000.0
#write_data apd_in_water.data
#run 1000000
#write_restart adp_in_water.rst
#dump production all xyz 100 production.xyz
