# ADP
units 			real
atom_style 		full
boundary		p p p
#pair_style		lj/cut/coul/long 12.0
pair_style		lj/cut/coul/cut 12.0
dielectric		1.0
pair_modify		tail yes mix geometric
bond_style		harmonic
angle_style		harmonic
dihedral_style	harmonic
#kspace_style	pppm 1.0e-8
kspace_style	none
#special_bonds	lj/coul 0.0 0.0 0.5
neighbor		2.0 bin
neigh_modify	every 1 delay 0 check yes
read_data		DATA_INPUT_FILE
group			mobile union all
timestep		1
velocity all create 300 13882
thermo			1000
fix 1 all nvt temp 300 300 100
fix ssages all ssages

#dump myDump all xyz 100 dump.xyz
